x := [-1; 1; 2; 3; 4]
y := [-5; -3; 18; 6; -2]
m := 4
i := 0 .. last(x)
j := 0 .. m
A[i, j] := x[i]^j
A = [1, -1, 1, -1, 1; 1, 1, 1, 1, 1; 1, 2, 4, 8, 16; 1, 3, 9, 27, 81; 1, 4, 16, 64, 256]
Z := transpose(A)*A
b := transpose(A)*y
c := Z^-1*b
c = [-36.6; 18.75; 30.2083; -17.75; 2.39167]
t := 1, 0.01 .. 8  # error: Необходимо определить переменную-диапазон с последовательными значениями.
φ(x) := sum(c[i]*x^i, i = 0 .. m)
sum((y[i] - φ(x[i]))^2, i = 0 .. last(x)) = 1.6993e-23
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