# Способы аппроксимации таблично заданной функции по МНК:
# Исходный набор "экспериментальных" точек:
n := 4  # (всего 8 точек)
f := transpose([-5, -3, 18, 6, -2])
x := transpose([-1, 1, 2, 3, 4])
m := 1  # (степень полинома, примем базис аппроксимации в виде степенных полиномов)
# 1 способ
i := 0 .. m
j := 0 .. m
k := 0 .. n
A[i, j] := sum(x[k]^(i + j), k)
B[j] := sum(x[k]^j*f[k], k)
C := transpose(A*A^-1)*A^-1*B
C = [0.027027; 1.54054]
# Создаем функцию "Poly" для вывода графика полинома:
Poly(x) := sum(C[i]*x^i, i)
z := 0, 0.1 .. 8  # - диапазон точек для графика функции.
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# Вычислим величину средне-
# квадратичного отклонения
# значений полинома и таблично
# заданной функции:
Q := sqrt(sum((f[k] - Poly(x[k]))^2, k))
Q = 17.991
# 2 способ
BF(x) := transpose([1, x, x^2, x^3, x^4, x^5])
C := linfit(x, f, BF)  # error: Число точек данных или выполнений должно быть по меньшей мере равным числу параметров.
C =  # error: Эта переменная не определена.
B2(x) := transpose([1, 1/x, 1/x^2, 1/x^3, 1/x^4])
D := linfit(x, f, B2)
Poly2(x) := B2(x)*D
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sqrt(sum((f[k] - Poly(x[k]))^2, k)) = 17.991
sqrt(sum((f[k] - Poly2(x[k]))^2, k)) = 7.27399e-14
