a := 0
b := 5
h := (b - a)/3 = 1.66667
x_0 := a = 0
x_1 := x_0 + h = 1.66667
x_2 := x_0 + 2*h = 3.33333
x_3 := 5
f(x) := 0.1*x + e^(0.3*x)
y_0 := f(x_0) = 1
y_1 := f(x_1) = 1.81539
y_2 := f(x_2) = 3.05162
y_3 := f(x_3) = 4.98169
solve block
    # guess values
    c_1 := 0
    c_2 := 0
    # constraints
    4*c_1 + c_2 == 0.459
    c_1 + 4*c_2 == 0.72
    # solver
    find(c_1, c_2) = [0.0744; 0.1614]
end solve block
solve block
    # guess values
    c_1 := 1
    c_2 := 100
    # constraints
    4*c_1 + c_2 == 0.459
    c_1 + 4*c_2 == 0.72
    # solver
    find(c_1, c_2) = [0.0744; 0.1614]
end solve block
c_0 := 0
c_1 := 0.074
c_2 := 0.161
c_3 := 0
d_0 := (c_1 - c_0)/(3*h) = 0.0148
d_1 := (c_2 - c_1)/(3*h) = 0.0174
d_2 := (c_3 - c_2)/(3*h) = -0.0322
b_0 := ((1.816 - 1)/h) - (h*(c_1 + 2*c_0)/3) = 0.448489
b_1 := ((3.051 - 1.816)/h) - (h*(c_2 + 2*c_1)/3) = 0.569333
b_2 := ((4.982 - 3.051)/h) - (h*(c_3 + 2*c_2)/3) = 0.979711
a_0 := y_0
a_1 := y_1
a_2 := y_2
a_3 := y_3
S_0(x) := 1 + 0.448*(x - x_0) + 0*(x - x_0)^2 + 0.015*(x - x_0)^3
S_1(x) := 1.815 + 0.569*(x - x_1) + 0.074*(x - x_1)^2 + 0.017*(x - x_1)^3
S_2(x) := 3.052 + 0.9797*(x - x_2) + 0.161*(x - x_2)^2 - 0.032*(x - x_2)^3
Spline(x) :=
    if a ≤ x < x_1
        S_0(x)
    if x_1 ≤ x < x_2
        S_1(x)
    if x_2 ≤ x < x_3
        S_2(x)
x := 0, 0.01 .. 5
# [plot: Spline(x), f(x) vs x]
