x := transpose([-1, 1, 2, 3, 4])
y := transpose([-5, -3, 18, 6, -2])
[4h, h, 0; h, 4h, h; 0, h, 4h]*[c_2; c_3; c_4]
s := cspline(x, y)
s = [0; 3; 2; 92.3529; -2.47059; -49.8824; 4; 57.8824]
A(t) := interp(s, x, y, t)
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a_1 := interp(s, x, y, -5) = 1478.53
a_2 := interp(s, x, y, -1) = -5
